// COMSOL Multiphysics 6.0.0.318 model "example.mph"
// Outline of the model tree

Parameters
  a = 1 [m]
  r = 0.13*a
  kx = 0
  ky = 0

Geometry
  geom1 "几何 1" (2D, length unit m)
    sq1: Square "正方形 1" | base = center; size = a
    c1: Circle "圆 1" | r = r
    arr1: Array "阵列 1" | input = c1, sq1; size = 2; type = linear; linearsize = 2; displ = {0, -1}
    fin: Finalize "形成联合体"

Physics
  emw: ElectromagneticWaves "电磁波，频域" on all domains
    dependent variable E = {Ex, Ey, Ez}
    ShapeProperty.order_electricfield = 1
    EquationForm.form = Frequency
    components.components = outofplane
    BackgroundField.ktMax = (2*(sqrt(2*log(10))))/emw.w0
    wee1: WaveEquationElectric "波动方程，电 1" (default)
      epsilonr_mat = userdef
      epsilonr = 13
      mur_mat = userdef
      mur = {1, -0.4i, 0, 0.4i, 1, 0, 0, 0, 1}
      sigma_mat = userdef
      sigma = 0
      minput_frequency = root.freq
    pec1: PerfectElectricConductor "理想电导体 1" (default)
    init1: init "初始值 1" (default)
    wee2: WaveEquationElectric "波动方程，电 2" on domains 1, 2
      epsilonr_mat = userdef
      epsilonr = 1
      mur_mat = userdef
      mur = 1
      sigma_mat = userdef
      sigma = 0
      minput_frequency = root.freq
    pc1: PeriodicCondition "周期性条件 1" (disabled) on boundaries 3, 7
      PeriodicType = Floquet
      kFloquet = {kx, ky, 0}
      destinationDomains: boundaries 7
    pc2: PeriodicCondition "周期性条件 2" on boundaries 1, 3, 6, 7
      PeriodicType = Floquet
      kFloquet = {kx, ky, 0}
      destinationDomains: boundaries 6, 7

Mesh
  mesh1 "网格 1"
    size: MeshSizeDefault "大小" | hauto = 4
    edg1: Edge "边 1" on boundaries 5
      size1: Size "大小 1" on boundaries 5
    cpe1: CopyEdge "复制边 1" | source = boundaries 5; destination = boundaries 2, 4
    edg2: Edge "边 2" on boundaries 1, 3
      size1: Size "大小 1" on boundaries 1, 3
    cpe3: CopyEdge "复制边 2" | source = boundaries 1, 3; destination = boundaries 6, 7
    ftri1: FreeTri "自由三角形网格 1" on domains 2, 4
      size1: Size "大小 1" on domains 2, 4 | hauto = 6
    copy1: Copy "复制 1" | source = domains 2, 4; destination = domains 1, 3

Studies
  std1 "研究 1"
    param: Parametric "参数化扫描" (disabled) | pname = a; plistarr = range(0,1/50,1); punit = m
    eig: Eigenfrequency "特征频率" | neigs = 1; eigunit = Hz; shift = 0.5*3*10^8

Solver configurations
  sol1 "解 1" (study std1)
    v1: Variables "因变量 1"
    e1: Eigenvalue "特征值求解器 1" | transform = eigenfrequency; neigs = 1; shift = 0.5*3*10^8
      d1: Direct "建议的直接求解器 (emw)" | linsolver = pardiso
  sol2 "参数化解 1" (study std1)

Datasets
  dset1: Solution | solution = sol1
  dset2: Solution | solution = sol2

Plots
  pg1: PlotGroup2D "电场 (emw)" | data = dset1
    surf1: Surface "表面" | expr = emw.normE