// COMSOL Multiphysics 6.0.0.318 model "example.mph"
// Outline of the model tree

Parameters
  a = 1 [m]
  r = 0.13*a
  kx = 0
  ky = 0

Geometry
  geom1 "几何 1" (2D, length unit m)
    c1: Circle "圆 1" | r = r
    sq1: Square "正方形 1" | base = center; size = a
    arr1: Array "阵列 1" | input = c1, sq1; size = 3; type = linear; linearsize = 3; displ = {0, -a}
    r1: Rectangle "矩形 1" | pos = {0, 1/2*a+0.25*a}; base = center; size = {a, 0.5*a}
    arr2: Array "阵列 2"
      input = arr1(1,2), arr1(2,1), arr1(2,2), arr1(3,1), arr1(3,2), r1
      size = 3
      type = linear
      linearsize = 3
      displ = {a, 0}
    arr3: Array "阵列 3" | input = arr1(1,1); size = 2; type = linear; linearsize = 2; displ = {2*a, 0}
    c2: Circle "圆 2" | pos = {a, 0}; r = 0.2*a
    fin: Finalize "形成联合体"
    ige1: IgnoreEdges "忽略边 1" | input = fin(1) boundaries 8, 10, 12, 14, 16, 17, 19, 21, 23, 25, 26

Physics
  emw: ElectromagneticWaves "电磁波，频域" on all domains
    dependent variable E = {Ex, Ey, Ez}
    ShapeProperty.order_electricfield = 1
    components.components = outofplane
    BackgroundField.ktMax = (2*(sqrt(2*log(10))))/emw.w0
    wee1: WaveEquationElectric "波动方程，电 1" (default)
      epsilonr_mat = userdef
      epsilonr = 1
      mur_mat = userdef
      mur = 1
      sigma_mat = userdef
      sigma = 0
      minput_frequency = root.freq
    pec1: PerfectElectricConductor "理想电导体 1" (default)
    init1: init "初始值 1" (default)
    wee2: WaveEquationElectric "波动方程，电 2" on domains 4-12
      epsilonr_mat = userdef
      epsilonr = 13
      mur_mat = userdef
      mur = {1, -0.4i, 0, 0.4i, 1, 0, 0, 0, 1}
      sigma_mat = userdef
      sigma = 0
      minput_frequency = root.freq
    wee3: WaveEquationElectric "波动方程，电 3" (disabled) on no domains
      epsilonr_mat = userdef
      epsilonr = 25
      mur_mat = userdef
      mur = {0.83054, 0.42371i, 0, -0.42371i, 0.83054, 0, 0, 0, 1}
      sigma_mat = userdef
      sigma = 0
      minput_frequency = root.freq
    pc1: PeriodicCondition "周期性条件 1" on boundaries 1, 3, 5, 8-10
      PeriodicType = Floquet
      kFloquet = {kx, ky, 0}
      destinationDomains: boundaries 8-10

Mesh
  mesh1 "网格 1"
    size: MeshSizeDefault "大小" | hmax = 0.235; hmin = 0.00105; hcurve = 0.3; hgrad = 1.3
    edg1: Edge "边 1" on boundaries 1, 3, 5
      size1: Size "大小 1" on boundaries 1, 3, 5 | hauto = 3
    cpe1: CopyEdge "复制边 1" | source = boundaries 1, 3, 5; destination = boundaries 8-10
    edg2: Edge "边 2" on boundaries 7
      size1: Size "大小 1" on boundaries 7 | hauto = 3
    cpe2: CopyEdge "复制边 2" | source = boundaries 7; destination = boundaries 2, 4, 6
    ftri1: FreeTri "自由三角形网格 1" on domains 3, 6, 7, 12
      size1: Size "大小 1" on domains 3, 6, 12 | hauto = 6
    ftri2: FreeTri "自由三角形网格 2" on domains 2, 5, 9, 11
      size1: Size "大小 1" on domains 2, 5, 9, 11 | hauto = 6
    copy1: Copy "副本 1" | source = domains 2, 5, 9, 11; destination = domains 1, 4, 8, 10

Studies
  std1 "研究 1"
    eig: Eigenfrequency "特征频率" | neigs = 1; eigunit = Hz; shift = 1.8066E8

Solver configurations
  sol1 "解 1" (study std1)
    v1: Variables "因变量 1"
    e1: Eigenvalue "特征值求解器 1"
      d1: Direct "建议的直接求解器 (emw)" | linsolver = pardiso

Datasets
  dset1: Solution | solution = sol1

Plots
  pg1: PlotGroup2D "电场 (emw)" | data = dset1
    surf1: Surface "表面" | expr = emw.normE