// COMSOL Multiphysics 6.0.0.318 model "example.mph"
// Outline of the model tree

Parameters
  a = 1[m]
  d0 = 0.615*a
  d1 = 0.615*a
  d2 = 0.11*a
  kx = pi/a/2
  ky = 0

Geometry
  geom1 "几何 1" (2D, length unit m)
    pol1: Polygon "多边形 1"
      source = table
      table = 
        {-a/4, -3*a/sqrt(3)/4}
        {-a/4+a, -3*a/sqrt(3)/4}
        {-a/4+a-a/2, -3*a/sqrt(3)/4+a*sqrt(3)/2}
        {-a/4-a/2, -3*a/sqrt(3)/4+a*sqrt(3)/2}
    pol2: Polygon "多边形 2"
      source = table
      table = 
        {(d1+2*d2)/2, -(d1+2*d2)/2/sqrt(3)}
        {-(d1+2*d2)/2, -(d1+2*d2)/2/sqrt(3)}
        {0, (d1+2*d2)/sqrt(3)}
    pol4: Polygon "多边形 4"
      source = table
      table = 
        {(d1+2*d2)/2, -(d1+2*d2)/2/sqrt(3)}
        {(d1+2*d2)/2-d2, -(d1+2*d2)/2/sqrt(3)}
        {(d1+2*d2)/2-d2/2, -(d1+2*d2)/2/sqrt(3)+d2*sqrt(3)/2}
    pol5: Polygon "多边形 5"
      source = table
      table = 
        {-(d1+2*d2)/2, -(d1+2*d2)/2/sqrt(3)}
        {-(d1+2*d2)/2+d2, -(d1+2*d2)/2/sqrt(3)}
        {-(d1+2*d2)/2+d2/2, -(d1+2*d2)/2/sqrt(3)+d2*sqrt(3)/2}
    pol6: Polygon "多边形 6"
      source = table
      table = 
        {0, (d1+2*d2)/sqrt(3)}
        {0-d2/2, (d1+2*d2)/sqrt(3)-d2*sqrt(3)/2}
        {0+d2/2, (d1+2*d2)/sqrt(3)-d2*sqrt(3)/2}
    dif1: Difference "差集 1" | input = pol2; input2 = pol4, pol5, pol6
    rot1: Rotate "旋转 1" | input = dif1; keep = on; rot = 180
    mov1: Move "移动 1" | input = rot1; displx = a/2; disply = -a/2*sqrt(3)
    mov2: Move "移动 2" | input = pol1; keep = on; displx = a/2; disply = -a/2*sqrt(3)
    pol3: Polygon "多边形 3" (disabled)
      source = table
      table = 
        {a/2, a/2/sqrt(3)}
        {0, a/sqrt(3)}
        {-a/2, a/2/sqrt(3)}
        {-a/2, -a/2/sqrt(3)}
        {0, -a/sqrt(3)}
        {a/2, -a/2/sqrt(3)}
    arr1: Array "阵列 1" | input = dif1, pol1; size = 2; type = linear; linearsize = 2; displ = {-a/2, a/2*sqrt(3)}
    arr2: Array "阵列 2" | input = mov1, mov2; size = 2; type = linear; linearsize = 2; displ = {a/2, -a/2*sqrt(3)}
    fin: Finalize "形成联合体"

Physics
  emw: ElectromagneticWaves "电磁波，频域" on all domains
    dependent variable E = {Ex, Ey, Ez}
    ShapeProperty.order_electricfield = 1
    components.components = outofplane
    wee1: WaveEquationElectric "波动方程，电 1" (default)
      epsilonr_mat = userdef
      epsilonr = 1
      mur_mat = userdef
      mur = 1
      sigma_mat = userdef
      sigma = 0
    pec1: PerfectElectricConductor "理想电导体 1" (default)
    init1: init "初始值 1" (default)
    wee2: WaveEquationElectric "波动方程，电 2" on domains 2, 4, 6, 8
      epsilonr_mat = userdef
      epsilonr = 1
      mur_mat = userdef
      mur = 13
      sigma_mat = userdef
      sigma = 0
    pc1: PeriodicCondition "周期性条件 1" on boundaries 1, 6, 13, 15, 22, 24, 32, 36
      PeriodicType = Floquet
      kFloquet = {kx, ky, 0}
      destinationDomains: boundaries 15, 24, 32, 36
    pmc1: PerfectMagneticConductor "理想磁导体 1" on boundaries 2, 31

Mesh
  mesh1 "网格 1"
    size: MeshSizeDefault "大小" | hauto = 3
    edg1: Edge "边 1" on boundaries 13
      size1: Size "大小 1" on boundaries 1, 6, 13, 22 | hmax = 0.075; hmin = 3.46E-4; hnarrow = 2; hauto = 1; custom = on
    cpe1: CopyEdge "复制边 1" | source = boundaries 13; destination = boundaries 32
    edg2: Edge "边 2" on boundaries 14
      size1: Size "大小 1" on boundaries 14 | hauto = 2
    cpe2: CopyEdge "复制边 2" | source = boundaries 14; destination = boundaries 2, 7, 23, 31
    ftri1: FreeTri "自由三角形网格 1" on domains 5, 6
    copy1: Copy "副本 1" | source = domains 5, 6; destination = domains 7, 8
    edg3: Edge "边 3" on boundaries 6
      size1: Size "大小 1" on boundaries 6 | hmax = 0.07; hmin = 3.46E-4; hnarrow = 2; custom = on; hgrad = 1.1
    cpe3: CopyEdge "复制边 3" | source = boundaries 6; destination = boundaries 24
    ftri2: FreeTri "自由三角形网格 2" on domains 3, 4
    copy2: Copy "副本 2" | source = domains 3, 4; destination = domains 1, 2

Studies
  std1 "研究 1"
    eig: Eigenfrequency "特征频率"
      eigmethod = region
      eigunit = Hz
      shift = 1[GHz]
      appnreigs = 10
      maxnreigs = 10
      eiglr = 1*3*10^8

Solver configurations
  sol1 "解 1" (study std1)
    v1: Variables "因变量 1"
    e1: Eigenvalue "特征值求解器 1"
      transform = eigenfrequency
      eigmethod = region
      appnreigs = 10
      maxnreigs = 10
      eiglr = 1*3*10^8
      d1: Direct "建议的直接求解器 (emw)" | linsolver = pardiso
  sol2 "参数化解 1" (study std1)

Datasets
  dset1: Solution | solution = sol1
  dset2: Solution | solution = sol2

Plots
  pg1: PlotGroup2D "电场 (emw)" | data = dset2
    surf1: Surface "表面" | expr = emw.normE
  pg2: PlotGroup1D "一维绘图组 2" | data = dset1
    glob1: Global "全局 1" | expr = freq*a/3/10^8; unit = m/s; xdata = expr; xdataexpr = kx
  pg3: PlotGroup2D "电场 (emw) 1" | data = dset1
    surf1: Surface "表面" | expr = emw.normE