// COMSOL Multiphysics 6.0.0.318 model "meshsweep_v4.mph"
// Outline of the model tree

Parameters
  ax = 3[mm]
  ay = 3[mm]
  az = 4.5[mm]
  d_pcb = 0.75[mm]
  d_metal = 1.6[mm]
  thick_metal = 0.2[mm]
  R_metal = 0.4[mm]
  az_total = az+2*d_pcb

Geometry
  geom1 "几何 1" (3D, length unit m)
    wp1: WorkPlane "工作平面 1" | unite = on
      r1: Rectangle "矩形 1" | base = center; size = {ax, ay}
      c1: Circle "圆 1" | pos = {d_metal/2, d_metal/2}; r = R_metal
      arr1: Array "阵列 1" | input = c1; size = {2, 2}; fullsize = {2, 2}; displ = {-d_metal, -d_metal}
      r2: Rectangle "矩形 2" | base = center; size = {d_metal+thick_metal*2, d_metal+thick_metal*2}
      r3: Rectangle "矩形 3" | base = center; size = {d_metal-thick_metal*2, d_metal-thick_metal*2}
      dif1: Difference "求差 1" | input = r2; input2 = r3
      dif2: Difference "求差 2" | input = dif1; input2 = arr1; keep = false
      c2: Circle "圆 2" | pos = {d_metal/2, d_metal/2}; r = R_metal
      arr2: Array "阵列 2" | input = c2; size = {2, 2}; fullsize = {2, 2}; displ = {-d_metal, -d_metal}
    ext1: Extrude "拉伸 1"
      workplane = wp1
      input = wp1
      distance = {0, d_pcb, d_pcb+az, d_pcb+az+d_pcb}
      scale = {{1, 1}, {1, 1}, {1, 1}, {1, 1}}
      displ = {{0, 0}, {0, 0}, {0, 0}, {0, 0}}
      twist = {0, 0, 0, 0}
      baseid = {0, 1, 3, 4, 5, 6, 2}
    mov1: Move "移动 1" | input = ext1; displx = 0; disply = 0; displz = -3*az_total/2
    arr1: Array "阵列 1" | input = mov1; size = {1, 1, 2}; fullsize = {1, 1, 2}; displ = {0, 0, az_total}
    fin: Finalize "形成联合体"

Physics
  ewfd: ElectromagneticWavesFrequencyDomain "电磁波，频域" on domains 1-7, 9, 10, 12, 13, 15, 16, 18-43, 45, 46, 48, 49, 51, 52, 54-60
    dependent variable E = {Ex, Ey, Ez}
    ShapeProperty.order_electricfield = 1
    wee1: WaveEquationElectric "波动方程，电 1" (default)
      DisplacementFieldModel = RelativePermittivity
      epsilonr_mat = userdef
      epsilonr = 2.2
      mur_mat = userdef
      mur = 1
      sigma_mat = userdef
      sigma = 0
    pec1: PerfectElectricConductor "理想电导体 1" (default)
    init1: init "初始值 1" (default)
    pc1: PeriodicCondition "周期性条件 1" on boundaries 1, 4, 7, 10, 13, 16, 329-334
      PeriodicType = Floquet
      kFloquet = {30, 40, 50}
      destinationDomains: boundaries 329-334
    pc2: PeriodicCondition "周期性条件 2" on boundaries 2, 5, 8, 11, 14, 17, 20-25
      PeriodicType = Floquet
      kFloquet = {30, 40, 50}
      destinationDomains: boundaries 20-25
    pec2: PerfectElectricConductor "理想电导体 2" on boundaries 69, 78, 146, 155, 177, 186, 267, 276

Mesh
  mesh1 "网格 1"
    size: MeshSizeDefault "大小" | hmax = 0.0012; hmin = 2.16E-4; hcurve = 0.6; hnarrow = 0.5; hgrad = 1.5
    edg1: Edge "边 1" on edges 2, 3
      size1: Size "大小 1" on edges 2, 3 | hauto = 2
    cpe1: CopyEdge "复制边 1" | source = edges 2, 3; destination = edges 22, 507
    ftri1: FreeTri "自由三角形网格 1" on boundaries 3, 28, 47, 66, 115, 140, 171, 202, 221, 264
      size1: Size "大小 1" on boundaries 3, 28, 47, 66, 115, 140, 171, 202, 221, 264 | hauto = 7
    swe1: Sweep "扫掠 1" on remaining entities
      sourceface = boundaries 3, 28, 47, 66, 115, 140, 171, 202, 221, 264
      targetface = boundaries 19, 44, 63, 82, 131, 156, 187, 218, 237, 280
      dis1: Distribution "分布 1" on domains 1-60 | numelem = 1

Studies
  std1 "研究 1"
    eig: Eigenfrequency "特征频率" | eigunit = GHz; shift = 1; eigwhich = lr; conrad = 1

Solver configurations
  sol1 "解 1" (study std1)
    v1: Variables "因变量 1"
    e1: Eigenvalue "特征值求解器 1"
      d1: Direct "建议的直接求解器 (ewfd)"

Datasets
  dset1: Solution | solution = sol1

Derived values
  gev1: EvalGlobal "特征频率 (ewfd)" | data = dset1; table = tbl1; expr = {ewfd.freq, ewfd.Qfactor}; unit = {GHz, 1}

Tables
  tbl1: Table "表格 1"
    特征频率 (GHz) | 频率 (GHz) | 品质因子 (1)
    5.06181+1.67621e-13i | 5.06181 | 1.5099e+13
    5.07192+6.09234e-13i | 5.07192 | 4.16254e+12
    8.06248-2.08096e-12i | 8.06248 | 1.9372e+12
    8.08382-3.11963e-13i | 8.08382 | 1.29564e+13
    13.5389+4.06893e-07i | 13.5389 | 1.66369e+07
    13.5835-3.98443e-07i | 13.5835 | 1.70457e+07

Plots
  pg1: PlotGroup3D "电场 (ewfd)" | data = dset1
    mslc1: Multislice "多切面 1" | expr = ewfd.normE